d_c := 120 mm
div := 500
d_l := 10 mm
R := d_c/2
r := d_l/2
H := sqrt(R^2 - r^2) = 59.7913 mm
S_A2x := integral(y*(sqrt(R^2 - y^2) - r), y = 0 .. H) = 63020.8 mm^3
A_2 := integral(sqrt(R^2 - y^2) - r, y = 0 .. R - r) = 2471.81 mm^2
y_G2 := S_A2x/A_2 = 25.4958 mm
h := 6 mm
AI := 1/4*π*d_c^2/4 = 2827.43 mm^2
AII := d_l/2*h = 30 mm^2
AIII := 1/2*d_l/2*d_l/2*tan(30 deg) = 7.21688 mm^2
A_1 := AI - AII - AIII = 2790.22 mm^2
y_GI := 2/3*d_c/π = 25.4648 mm
y_GII := h/2 = 3 mm
y_GIII := h + d_l/2*tan(30 deg)*1/3 = 6.96225 mm
y_G1 := (y_GI*AI - y_GII*AII - y_GIII*AIII)/A_1 = 25.7542 mm
y_pG := A_2*(y_G1 + y_G2)/(A_1 + A_2) = 24.0744 mm
y_G := y_G1 - y_pG = 1.67976 mm
J_A2n := 2*integral(y^2*(sqrt(R^2 - (y - y_G)^2) - r), y = 0 .. H + y_G) = 4809753 mm^4
J_A1pn := 2*integral(y^2*(sqrt(R^2 - (y + y_G)^2) - r), y = 0 .. R - y_G) = 3960329 mm^4
J_rn := d_l*(h - y_G)^3/12 + (h - y_G)*d_l*((h - y_G)/2)^2 = 268.783 mm^4
J_Tn := d_l*(r*tan(30 deg))^3/36 + d_l*r*tan(30 deg)/2*(r*tan(30 deg)/3 + (h - y_G))^2 = 409.452 mm^4
J_ACn := J_A2n + J_A1pn - J_rn - J_Tn = 8769403 mm^4
J_XX := π*d_c^4/64 = 10178760 mm^4
p := 100*(J_XX - J_ACn)/J_XX = 13.8461
y_br := -(h - y_G), -(h - y_G) + (H + y_G - (h - y_G))/div .. H + y_G
S_1ACn(y_br) := 2*integral(y*(sqrt(R^2 - (y - y_G)^2) - r), y = y_br .. H + y_G)
# [plot: S_1ACn(y_br) (mm^3) vs y_br (mm)]
S_1ACn(0) = 134689 mm^3
y_br := -((h - y_G) + r*tan(30 deg)), -((h - y_G) + r*tan(30 deg)) + (-(h - y_G) + ((h - y_G) + r*tan(30 deg)))/div .. -(h - y_G)
S_2ACn(y_br) := 2*integral(y*(sqrt(R^2 - (y - y_G)^2) - r), y = -(h - y_G) .. H + y_G) + 2*integral(y*(sqrt(R^2 - (|y| + y_G)^2) - r + (|y| - (h - y_G))/tan(30 deg)), y = -y_br .. -(h - y_G))
# [plot: S_2ACn(y_br) (mm^3) vs y_br (mm)]
y_br := -(R - y_G), -(R - y_G) + (-r*tan(30 deg) - (h - y_G) + (R - y_G))/div .. -r*tan(30 deg) - (h - y_G)
S_3ACn(y_br) := 2*integral(y*(sqrt(R^2 - (y - y_G)^2) - r), y = -(h - y_G) .. H + y_G) + 2*integral(y*(sqrt(R^2 - (|y| + y_G)^2) - r + (|y| - (h - y_G))/tan(30 deg)), y = -((h - y_G) + r*tan(30 deg)) .. -(h - y_G)) + 2*integral(y*sqrt(R^2 - (|y| + y_G)^2), y = -y_br .. -((h - y_G) + r*tan(30 deg)))
# [plot: S_3ACn(y_br) (mm^3) vs y_br (mm)]
S_3ACn(R - y_G) = 185.792 mm^3
S_3ACn(0) = 134858 mm^3
S_3ACn(R - y_G)/S_3ACn(0)*100 = 0.137768
# Calcolo del taglio
G_u := 55000 kgf
G_i := 227 kgf
G_g := 180 kgf
l := 257 mm
l_p := (84 mm - 13 mm)*3 = 213 mm
q := (G_u + G_i + G_g)/l_p = 260.127 kgf/mm
q_S := (G_u + G_i + G_g)/l = 215.591 kgf/mm
(q - q_S)/q*100 = 17.1206
a := 70 mm
q_p := q*l/(2*a) = 477.518 kgf/mm
f := 43.25 mm
T_AA := q_p*a - q*f = 22175.8 kgf
y_br := -(h - y_G), -(h - y_G) + (H + y_G + (h - y_G))/div .. H + y_G
b_r(y_br) := sqrt(R^2 - (y_br - y_G)^2) - r
# [plot: b_r(y_br) (mm) vs y_br (mm)]
b_r(y_G) = 55 mm
S_1ACn(y_br) := 2*integral(y*sqrt(R^2 - (y - y_G)^2), y = y_br .. H + y_G)
τ_zym(y_br) := T_AA/2/(J_ACn/2)*S_1ACn(y_br)/(2*b_r(y_br))
# [plot: τ_zym(y_br) (kgf/mm^2) vs y_br (mm)]
# In corrispondenza dell'asse neutro
τ_zym(0) = 3.53219 kgf/mm^2
τ_m := T_AA/(2*(A_1 + A_2)) = 2.10715 kgf/mm^2
α(y_br) := 180/π*atan((y_br - y_G)/(b_r(y_br) + r))
α(y_G) = 0
# [plot: α(y_br) (rad) vs y_br (mm)]
τ_z(y_br) := τ_zym(y_br)/cos(α(y_br) deg)
# [plot: τ_z(y_br) (kgf/mm^2) vs y_br (mm)]
τ_z(0) = 3.53357 kgf/mm^2
τ_z(-(h - y_G)) = 3.54204 kgf/mm^2
# Valuto le tensioni ti taglio nel tratto di generatrice conica
y_br := -r*tan(30 deg) - (h - y_G), -r*tan(30 deg) - (h - y_G) + r*tan(30 deg)/div .. -(h - y_G)
S_2ACn(y_br) := 2*integral(y*(sqrt(R^2 - (y - y_G)^2) - r), y = -(h - y_G) .. H + y_G) + 2*integral(y*(sqrt(R^2 - (|y| + y_G)^2) - r + (|y| - (h - y_G))/tan(30 deg)), y = -y_br .. -(h - y_G))
b_r(y_br) := sqrt(R^2 - (|y_br| + y_G)^2) - r + (|y_br| - (h - y_G))/tan(30 deg)
α(y_br) := 180/π*atan((|y_br| + y_G)/(b_r(y_br) + (|y_br| - (h - y_G))/tan(30 deg)))
# [plot: b_r(y_br) (mm) vs y_br (mm)]
# [plot: α(y_br) (deg) vs y_br (mm)]
τ_zym(y_br) := T_AA/2/(J_ACn/2)*S_2ACn(y_br)/(2*b_r(y_br))
# [plot: τ_zym(y_br) (kgf/mm^2) vs y_br (mm)]
τ_zp(y_br) := τ_zym(y_br)/cos(30 deg)
τ_zpp(y_br) := τ_zym(y_br)/cos(α(y_br) deg)
# [plot: τ_zp(y_br) (kgf/mm^2), τ_zpp(y_br) (kgf/mm^2) vs y_br (mm)]
τ_zp(-(h - y_G)) = 3.56769 kgf/mm^2
y_br := y_G - R, y_G - R + (R - h - r*tan(30 deg))/div .. -(h - y_G) - r*tan(30 deg)
b_r(y_br) := 2*sqrt(R^2 - (|y_br| + y_G)^2)
α(y_br) := 180/π*atan((|y_br| + y_G)/(b_r(y_br)/2))
# [plot: b_r(y_br) (mm) vs y_br (mm)]
# [plot: α(y_br) (deg) vs y_br (mm)]
τ_zym(y_br) := T_AA/J_ACn*S_3ACn(y_br)/b_r(y_br)
# [plot: τ_zym(y_br) (kgf/mm^2) vs y_br (mm)]
τ_z(y_br) := τ_zym(y_br)/cos(α(y_br)*deg)
# [plot: τ_z(y_br) (kgf/mm^2) vs y_br (mm)]
y_br := 0, r/div .. r
S_nr1(y_br) := integral(y*(sqrt(R^2 - y^2) - sqrt(r^2 - y^2)), y = y_br .. r) + integral(y*sqrt(R^2 - y^2), y = r .. R)
# [plot: S_nr1(y_br) (mm^3) vs y_br (mm)]
# [plot: b_r(y_br) (mm) vs y_br (mm)]
b_r1(y_br) := sqrt(R^2 - y_br^2) - sqrt(r^2 - y_br^2)
b_r1(0 mm) = 55 mm
S_nr1(0 mm) = 71959.6 mm^3
b_r1(r) = 59.7913 mm
S_nr1(r) = 71252.6 mm^3
y_br := r, r + (R - r)/div .. R
S_nr2(y_br) := integral(y*sqrt(R^2 - y^2), y = y_br .. R)
# [plot: S_nr2(y_br) (mm^3) vs y_br (mm)]
b_r2(y_br) := sqrt(R^2 - y_br^2)
# [plot: b_r2(y_br) (mm) vs y_br (mm)]
b_r2(r) = 59.7913 mm
b_r2(R) = 0 mm
T_BB := q_p*a = 33426.3 kgf
d_c = 120 mm
d_l = 10 mm
J_Bn := π/64*(d_c^4 - d_l^4) = 10178269 mm^4
τ_zym(y_br) := T_BB/2/(J_Bn/2)*S_nr1(y_br)/b_r1(y_br)
y_br := 0, r/div .. r - r/div
# [plot: τ_zym(y_br) (kgf/mm^2) vs y_br (mm)]
τ_zym(0 mm) = 4.29675 kgf/mm^2
τ_zym(r) = 3.9136 kgf/mm^2
α(y_br) := atan(y_br/sqrt(R^2 - y_br^2))
α_p(y_br) := asin(y_br/r)
# [plot: α(y_br) (rad), α_p(y_br) (rad) vs y_br (mm)]
τ_z(y_br) := T_BB/2/(J_Bn/2)*S_nr1(y_br)/(b_r1(y_br)*cos(α(y_br)))
τ_zp(y_br) := T_BB/2/(J_Bn/2)*S_nr1(y_br)/(b_r1(y_br)*cos(α_p(y_br)))
# [plot: τ_z(y_br) (kgf/mm^2), τ_zp(y_br) (kgf/mm^2) vs y_br (mm)]
τ_z(0 mm) = 4.29675 kgf/mm^2
τ_zp(0 mm) = 4.29675 kgf/mm^2
τ_z(r) = 3.92726 kgf/mm^2
# Sezione piena
y_br := r, r + (R - r)/div .. R
τ_zym(y_br) := T_BB/J_Bn*S_nr2(y_br)/b_r2(y_br)
τ_zym(r) = 3.9136 kgf/mm^2
τ_zym(R - 0.001 mm) = 0.000131363 kgf/mm^2
# [plot: τ_zym(y_br) (kgf/mm^2) vs y_br (mm)]
τ_z(y_br) := T_BB/J_Bn*S_nr2(y_br)/(b_r2(y_br)*cos(α(y_br)))
# [plot: τ_z(y_br) (kgf/mm^2) vs y_br (mm)]
τ_z(r) = 3.92726 kgf/mm^2
τ_z(R - 0.0001 mm) = 0.00719512 kgf/mm^2
τ_zp(y_br) := τ_zym(0 mm) - (τ_zym(0 mm) - τ_zym(r))*y_br/r
# [plot: τ_zp(y_br) (kgf/mm^2) vs y_br (mm)]
τ_zym(0 mm) = 3.94098 kgf/mm^2
τ_zp(0 mm) = 3.94098 kgf/mm^2
r = 5 mm
τ_zym(r) = 3.9136 kgf/mm^2
τ_zp(r) = 3.9136 kgf/mm^2
y_br := 0, r/div .. r
α(y_br) := atan(y_br/sqrt(R^2 - y_br^2))
τ_z1(y_br) := T_BB/2/(J_Bn/2)*S_nr1(y_br)/(b_r1(y_br)*cos(α(y_br)))
τ_z2(y_br) := T_BB/J_Bn*S_nr2(y_br)/(b_r2(y_br)*cos(α(y_br)))
# [plot: τ_zp(y_br) (kgf/mm^2), τ_z1(y_br) (kgf/mm^2) vs y_br (mm)]
# [plot: τ_z2(y_br) (kgf/mm^2) vs y_br (mm)]
# Calcolo dei momenti flettenti
x := 0, a/div .. a
M(x) := q_p*x*x/2
# [plot: M(x) (kgf*mm) vs x (mm)]
M(a) = 1169920 kgf*mm
x := a, a + l/2/div .. l/2 + a
M(x) := q_p*a*(x - a/2) - q*(x - a)^2/2
M(a) = 1169920 kgf*mm
# [plot: M(x) (kgf*mm) vs x (mm)]
M_BB := M(a) = 1169920 kgf*mm
a = 70 mm
f = 43.25 mm
M_AA := M(a + f) = 2372315 kgf*mm
M_CC := M(a + l/2) = 3317559 kgf*mm
σ_AAmax := M_AA/(J_ACn/(H + y_G)) = 16.6293 kgf/mm^2
H + y_G = 61.4711 mm
R - y_G = 58.3202 mm
σ_BBmax := M_BB/(J_Bn/R) = 6.89658 kgf/mm^2
σ_CCmax := M_CC/(J_ACn/(H + y_G)) = 23.2552 kgf/mm^2
y_br := 0, R/div .. R
σ_BB(y_br) := M_BB*y_br/J_Bn
# [plot: σ_BB(y_br) (kgf/mm^2) vs y_br (mm)]
σ_1BBid(y_br) := sqrt(σ_BB(y_br)^2 + 3*τ_z1(y_br)^2)
σ_2BBid(y_br) := sqrt(σ_BB(y_br)^2 + 3*τ_z2(y_br)^2)
y_br := 0, r/div .. r
# [plot: σ_1BBid(y_br) (kgf/mm^2) vs y_br (mm)]
y_br := 0, R/div .. R
# [plot: σ_2BBid(y_br) (kgf/mm^2) vs y_br (mm)]
σ_1BBid(0 mm) = 7.44219 kgf/mm^2
σ_BB(0 mm) = 0 kgf/mm^2
τ_z1(0 mm) = 4.29675 kgf/mm^2
σ_1BBid(r) = 6.82646 kgf/mm^2
σ_BB(r) = 0.574715 kgf/mm^2
τ_z1(r) = 3.92726 kgf/mm^2
σ_2BBid(R - 0.001 mm) = 6.89657 kgf/mm^2
σ_BB(R) = 6.89658 kgf/mm^2
τ_z2(R - 0.001 mm) = 0.0227529 kgf/mm^2
σ_2BBid(r) = 6.82646 kgf/mm^2
σ_BB(r) = 0.574715 kgf/mm^2
τ_z2(r) = 3.92726 kgf/mm^2
# Sollecitazione ideale massima nella sezione A-A
y_br := 0, (H + y_G)/div .. H + y_G
b_r(y_br) := sqrt(R^2 - (y_br - y_G)^2) - r
S_1ACn(y_br) := 2*integral(y*(sqrt(R^2 - (y - y_G)^2) - r), y = y_br .. H + y_G)
τ_zym(y_br) := T_AA/2/(J_ACn/2)*S_1ACn(y_br)/(2*b_r(y_br))
α(y_br) := 180/π*atan((y_br - y_G)/(b_r(y_br) + r))
τ_z(y_br) := τ_zym(y_br)/cos(α(y_br) deg)
# [plot: τ_z(y_br) (kgf/mm^2) vs y_br (mm)]
τ_z(0) = 3.09888 kgf/mm^2
σ_AA(y_br) := M_AA*y_br/J_ACn
σ_1AAid(y_br) := sqrt(σ_AA(y_br)^2 + 3*τ_z(y_br)^2)
σ_1AAid(H + y_G) = 16.6293 kgf/mm^2
σ_AA(H + y_G) = 16.6293 kgf/mm^2
τ_z(H + y_G) = 0 kgf/mm^2
y_br := -(h - y_G), -(h - y_G) + (h - y_G)/div .. 0
S_2ACn(y_br) := 2*integral(y*(sqrt(R^2 - (y - y_G)^2) - r), y = -(h - y_G) .. H + y_G) + .2*integral(y*(sqrt(R^2 - (|y| + y_G)^2) - r + (|y| - (h - y_G))/tan(30 deg)), y = -y_br .. -(h - y_G))
b_r(y_br) := sqrt(R^2 - (y_br - y_G)^2) - r
α(y_br) := 180/π*atan(|y_br - y_G|/(b_r(y_br) + r))
# [plot: α(y_br) (rad) vs y_br (mm)]
τ_zym(y_br) := T_AA/2/(J_ACn/2)*S_2ACn(y_br)/(2*b_r(y_br))
τ_z(y_br) := τ_zym(y_br)/cos(α(y_br)*deg)
σ_2AAid(y_br) := sqrt(σ_AA(y_br)^2 + 3*τ_z(y_br)^2)
# [plot: σ_2AAid(y_br) (kgf/mm^2) vs y_br (mm)]
σ_2AAid(-(h - y_G)) = 5.50402 kgf/mm^2
y_br := -(h - y_G), -(h - y_G) - r*tan(30 deg)/div .. -(h - y_G + r*tan(deg))
S_2ACn(y_br) := 2*integral(y*(sqrt(R^2 - (y - y_G)^2) - r), y = -(h - y_G) .. H + y_G) + 2*integral(y*(sqrt(R^2 - (|y| + y_G)^2) - r + (|y| - (h - y_G))/tan(30 deg)), y = -y_br .. -(h - y_G))
b_r(y_br) := sqrt(R^2 - (|y_br| + y_G)^2) - r + (|y_br| - (h - y_G))/tan(30 deg)
α(y_br) := 180/π*atan((|y_br| + y_G)/(b_r(y_br) + (|y_br| - (h - y_G))/tan(30 deg)))
τ_zym(y_br) := T_AA/2/(J_ACn/2)*S_2ACn(y_br)/(2*b_r(y_br))
τ_zp(y_br) := τ_zym(y_br)/cos(30 deg)
τ_zpp(y_br) := τ_zym(y_br)/cos(α(y_br) deg)
# [plot: τ_zp(y_br) (kgf/mm^2), τ_zpp(y_br) (kgf/mm^2) vs y_br (mm)]
σ_p3AAid(y_br) := sqrt(σ_AA(y_br)^2 + 3*τ_zp(y_br)^2)
σ_pp3AAid(y_br) := sqrt(σ_AA(y_br)^2 + 3*τ_zpp(y_br)^2)
# [plot: σ_p3AAid(y_br) (kgf/mm^2), σ_pp3AAid(y_br) (kgf/mm^2) vs y_br (mm)]
σ_p3AAid(-(h - y_G)) = 6.28898 kgf/mm^2
y_br := -(R - y_G), -(R - y_G) + (-(h - y_G + r*tan(30 deg)) + (R - y_G))/div .. -(h - y_G + r*tan(30 deg))
b_r(y_br) := 2*sqrt(R^2 - (|y_br| + y_G)^2)
α(y_br) := 180/π*atan((|y_br| + y_G)/(b_r(y_br)/2))
S_3ACn(y_br) := 2*integral(y*(sqrt(R^2 - (y - y_G)^2) - r), y = -(h - y_G) .. H + y_G) + 2*integral(y*(sqrt(R^2 - (|y| + y_G)^2) - r + (|y| - (h - y_G))/tan(30 deg)), y = -((h - y_G) + r*tan(30 deg)) .. -(h - y_G)) + 2*integral(y*sqrt(R^2 - (|y| + y_G)^2), y = -y_br .. -((h - y_G) + r*tan(30 deg)))
τ_zym(y_br) := T_AA/J_ACn*S_3ACn(y_br)/b_r(y_br)
τ_z(y_br) := τ_zym(y_br)/cos(α(y_br) deg)
# [plot: τ_z(y_br) (kgf/mm^2) vs y_br (mm)]
σ_4AAid(y_br) := sqrt(σ_AA(y_br)^2 + 3*τ_z(y_br)^2)
# [plot: σ_4AAid(y_br) (kgf/mm^2) vs y_br (mm)]
|σ_AA(-(R - y_G))| = 15.7769 kgf/mm^2
σ_1AAid(H + y_G) = 16.6293 kgf/mm^2
σ_1BBid(0 mm) = 7.44219 kgf/mm^2
# Sollecitazione ideale massima nella sezione C-C
σ_CCmax = 23.2552 kgf/mm^2
σ_idCCmax := σ_CCmax
