# Inizializzazione dei dati
G_u := 55000 kgf
v_soll := 5.5*m/min
t_0 := 5 s
a_pm := v_soll/t_0 = 0.0183333 m/s^2
a_pmax := 2*a_pm = 0.0366667 m/s^2
s_p := 0.5*a_pm*t_0^2 = 0.229167 m
v_disc := 1.1*v_soll = 6.05 m/min
a_m := v_disc/t_0 = 0.0201667 m/s^2
s := 0.5*a_m*t_0^2 = 0.252083 m
a_max := 2*a_m = 0.0403333 m/s^2
G_i := G_u/(9.81 m/s^2)*a_max = 226.13 kgf
|G_i/G_u|*100 = 0.411145
# Quote riferite a tabella 4.2c - Fig 4.7d
d := 165 mm
d_1 := 207 mm
a := 145 mm
b := 52 mm
e := 166 mm
m := 807 mm
h := 321 mm
r := 269 mm
e_1 := 372 mm
# Dimensionamento sezione resistente trapezia
Q := G_u/2 = 27500 kgf
I := m/2 - r = 134.5 mm
y_A := h - r = 52 mm
x_A := e_1/2 - I = 51.5 mm
γ := atan(I/(h - y_A)) = 26.5651 deg
α := 0, γ/6 .. γ
β(α) := γ - α
x_C(α) := (h - y_A)*tan(β(α))
y_C(α) := 0
a_0(α) := 1 + tan(β(α))^2
b_0(α) := -2*y_A - 2*tan(β(α))*x_A
c_0(α) := x_A^2 + y_A^2 - d_1^2/4
y_1(α) := (-b_0(α) + sqrt(b_0(α)^2 - 4*a_0(α)*c_0(α)))/(2*a_0(α))
y_2(α) := (-b_0(α) - sqrt(b_0(α)^2 - 4*a_0(α)*c_0(α)))/(2*a_0(α))
y_2(α) = [-28.0975; -29.675; -31.2597; -32.8581; -34.4751; -36.1145; -37.7775] mm
α = [0; 4.42751; 8.85502; 13.2825; 17.71; 22.1375; 26.5651] deg
y_B(α) := |y_2(α)|
x_B(α) := |y_2(α)*tan(β(α))|
x_B(α) = [14.0488; 12.0724; 9.98228; 7.75673; 5.37093; 2.7963; 0] mm
y_B(α) = [28.0975; 29.675; 31.2597; 32.8581; 34.4751; 36.1145; 37.7775] mm
α = [0; 4.42751; 8.85502; 13.2825; 17.71; 22.1375; 26.5651] deg
I_C(α) := sqrt((x_C(α) - x_B(α))^2 + (h - y_C(α) - y_A - y_B(α))^2)
I_C(α) = [269.337; 258.372; 249.568; 242.633; 237.354; 233.583; 231.222] mm
BO(α) := I_C(α)/3*(a + 2*b)/(a + b)
AB(α) := sqrt(x_B(α)^2 + y_B(α)^2)
AO(α) := BO(α) + AB(α)
x_O(α) := -AO(α)*sin(β(α))
y_O(α) := -AO(α)*cos(β(α))
# Calcolo curvatura baricentrica
ρ(α) := (AO(α)^2 + (d/dα(AO(α)))^2)^1.5/(AO(α)^2 + 2*(d/dα(AO(α)))^2 - AO(α)*d^2/dα^2(AO(α)))
# [plot: ρ(α) (mm) vs α (rad)]
# Calcolo dell'anomalia della curvatura rispetto ad una retta orizzontale
Θ(α) := atan(d/dα(y_O(α))/d/dα(x_O(α)))
δ(α) := Θ(α) + π/2
α_negρ := 0.448 rad
α_posρ := 0.464 rad
α := 0, α_negρ/10 .. α_negρ
I_r := h - d_1/2 = 217.5 mm
ψ := atan(e_1/(2*h)) = 30.0897°
NR := I_r/3*(a + 2*b)/(a + b) = 91.6371 mm
MR := I_r - NR = 125.863 mm
b_x := (NR + d_1/2)*sin(ψ) + (NR + d_1/2)*sqrt(2)/2 = 235.816 mm
b_y := (NR + d_1/2)*cos(ψ) - (NR + d_1/2)*sqrt(2)/2 = 30.858 mm
M_q := Q*b_x + Q*b_y = 7333525 kgf*mm
A := (a + b)*I_r/2 = 21423.8 mm^2
ρ := NR + d_1/2 = 195.137 mm
χ := -1/A*integral(η/(ρ + η)*(b + (a - b)/I_r*(MR + η)), η = -MR .. NR) = 0.136667
σ_N := 1/A*Q/(sqrt(2)/2)*sin(ψ + π/4) - M_q/(A*ρ) - M_q/(χ*A*ρ)*(-NR/(ρ - NR)) = 11.3644 kgf/mm^2
σ_M := 1/A*Q/(sqrt(2)/2)*sin(ψ + π/4) - M_q/(A*ρ) - M_q/(χ*A*ρ)*MR/(ρ + MR) = -5.03277 kgf/mm^2
τ_ND := 3/2*Q/(sqrt(2)/2)*cos(ψ + π/4)/(b*(sqrt((e_1/2)^2 + h^2) - d_1/2)) = 1.07912 kgf/mm^2
τ_Ir := 3/2*Q/(sqrt(2)/2)*cos(ψ + π/4)/(b*I_r) = 1.32717 kgf/mm^2
# Considero un nuovo solido fittizio più cautelativo
a_0 := 1 + tan(-π/4)^2
q := y_A - tan(-π/4)*x_A
b_0 := 2*tan(-π/4)*q
c_0 := q^2 - h^2
x_1 := (-b_0 + sqrt(b_0^2 - 4*a_0*c_0))/(2*a_0) = 272.753 mm
x_2 := (-b_0 - sqrt(b_0^2 - 4*a_0*c_0))/(2*a_0) = -169.253 mm
x_S := x_1
y_S := tan(-π/4)*x_1 + q = -169.253 mm
h_s := sqrt((x_S - x_A)^2 + (y_S - y_A)^2) = 312.899 mm
NU := h_s - d_1/2 = 209.399 mm
NV := NU/3*(a + 2*b)/(a + b) = 88.2241 mm
UV := NU - NV = 121.175 mm
b_x := (NV + d_1/2)*sin(ψ) + (NV + d_1/2)*sqrt(2)/2 = 231.691 mm
b_y := (NV + d_1/2)*cos(ψ) - (NV + d_1/2)*sqrt(2)/2 = 30.3183 mm
M_q := Q*b_x + Q*b_y = 7205261 kgf*mm
A := (a + b)*NU/2 = 20625.8 mm^2
ρ := NV + d_1/2 = 191.724 mm
χ := -1/A*integral(η/(ρ + η)*(b + (a - b)/NU*(UV + η)), η = -UV .. NV) = 0.129251
σ_N := 1/A*Q/(sqrt(2)/2)*sin(ψ + π/4) - M_q/(A*ρ) - M_q/(χ*A*ρ)*(-NV/(ρ - NV)) = 12.0164 kgf/mm^2
σ_U := 1/A*Q/(sqrt(2)/2)*sin(ψ + π/4) - M_q/(A*ρ) - M_q/(χ*A*ρ)*UV/(ρ + UV) = -5.4593 kgf/mm^2
# Carico applicato verticalmente, passante per O' con il nuovo solido fittizio per la verifica del gambo
ρ := d_1/2 + d/2 = 186 mm
b_X := ρ*(1 + sqrt(2)/2) = 317.522 mm
b_Y := ρ*sqrt(2)/2 = 131.522 mm
M_q := Q*b_X - Q*b_Y = 5115000 kgf*mm
A := π*d^2/4 = 21382.5 mm^2
χ := 1/4*(d/(2*ρ))^2 + 1/8*(d/(2*ρ))^4 + 5/(6 + 4)*(d/(2*ρ))^6 = 0.0578292
σ_K := Q/A - M_q/(A*ρ) + M_q/(χ*A*ρ)*d/(2*ρ - d) = 17.7273 kgf/mm^2
σ_W := Q/A - M_q/(A*ρ) - M_q/(χ*A*ρ)*d/(2*ρ + d) = -6.83341 kgf/mm^2
# Verifica del gambo del gancio
M_q := ρ*Q = 5115 kgf*m
P := 16 mm
m := 125 mm
i := 0.8*m/P = 6.25
G_g := 1800 kgf
G_i := (G_u + G_g)/(9.81 m/s^2)*a_max = 233.53 kgf
|G_i/G_u|*100 = 0.424601
d_3 := 122.4 mm
σ := (G_u + G_g + G_i)/(π*(1.2*d_3)^2/4) = 3.36601 kgf/mm^2
τ := 1.5*(G_u + G_i + G_g)/(π*d_3*P*i) = 2.2248 kgf/mm^2
# Verifica a schiacciamento dei filetti
d := 140 mm
σ := (G_u + G_g + G_i)/(i*π*(d^2 - d_3^2)/4) = 2.51584 kgf/mm^2
