G_u := 55000 kgf
w
G_i := 227 kgf
G_g := 180 kgf
# Dalle tabelle 4.5a - 4.1b
d_t := 105 mm
A_1 := 220 mm
s_1 := 25 mm
s_2 := 6 mm
l_1 := 190 mm
S_1 := s_1*(A_1 - d_t) = 2875 mm^2
σ := (G_u + G_g + G_i)/(2*S_1) = 9.636 kgf/mm^2
d_t/A_1 = 0.477273
l_1/A_1 = 0.863636
x := [0.274; 0.350; 0.450; 0.550; 0.650; 0.7]
y := [4.1; 3.35; 2.75; 2.45; 2.3; 2.25]
y_S := lspline(x, y)
k_t := interp(y_S, x, y, d_t/A_1) = 2.64678
x_c := x[0], x[0] + (x[5] - x[0])/10 .. x[5] = [0.274; 0.3166; 0.3592; 0.4018; 0.4444; 0.487; 0.5296; 0.5722; 0.6148; 0.6574; 0.7]
k_t := interp(y_S, x, y, x_c)
# [plot: k_t vs x_c]
k_t := interp(y_S, x, y, d_t/A_1) = 2.64678
σ_max := k_t*σ = 25.5044 kgf/mm^2
# Maggioro s1 e s2 a sensibilità personale
s_1 := 50 mm
s_2 := 40 mm
S_1 := s_1*(A_1 - d_t) = 5750 mm^2
S_2 := s_2*(A_1 - d_t) = 4600 mm^2
σ := (G_u + G_i + G_g)/(2*(S_1 + S_2)) = 2.67667 kgf/mm^2
σ_max := k_t*σ = 7.08455 kgf/mm^2
f(dx) := interp(y_S, x, y, d_t/A_1)/(s_1*(A_1 - d_t)) - interp(y_S, x, y, d_t/dx)/(s_2*(dx - d_t))
dx_1 := A_1 = 220 mm
dx_2 := 3*A_1 = 660 mm
dx_S := root(f(dx), dx, dx_1, dx_2) = 272.895 mm
dx := dx_1, dx_1 + (dx_2 - dx_1)/50 .. dx_2
# [plot: interp(y_S, x, y, d_t/A_1)/(s_1*(A_1 - d_t)), interp(y_S, x, y, d_t/dx)/(s_2*(dx - d_t)) vs dx (mm)]
σ_l := (G_u + G_g + G_i)/(4*s_1*(A_1 - d_t)) = 2.409 kgf/mm^2
σ_p := (G_u + G_g + G_i)/(4*s_2*(dx_S - d_t)) = 2.06256 kgf/mm^2
kt_l := interp(y_S, x, y, d_t/A_1) = 2.64678
kt_p := interp(y_S, x, y, d_t/dx_S) = 3.09134
σ_maxl := kt_l*σ_l = 6.37609 kgf/mm^2
σ_maxp := kt_p*σ_p = 6.37609 kgf/mm^2
α := π/2 - atan((dx_S - A_1)/(2*l_1)) = 82.0755 deg
a := s_1 + s_2 = 90 mm
B_t := 245 mm
d_2 := 130 mm
c := (B_t + d_2)/2 = 187.5 mm
T := 84 mm
b := (3*T + 5 mm - c)/2 = 34.75 mm
I := 3*T + 5 mm + 2*a = 437 mm
q := (G_u + G_g + G_i)/c = 295.504 kgf/mm
q_p := (G_u + G_g + G_i)/(2*a) = 307.817 kgf/mm
M_CC := q_p*a^2/2 = 1246658 kgf*mm
M_BB := q*c^2/8 + a*q_p*(c/2 + b + a/2) = 6105159 kgf*mm
T_CC := q_p*a = 27703.5 kgf
H_t := 113 mm
A_t := 395 mm
d_f := 188 mm
s := (A_t - d_f)/2
J_XX := 2*s*H_t^3/12 = 24889973 mm^4
σ_maxBB := M_BB/(J_XX/(H_t/2)) = 13.8587 kgf/mm^2
σ_maxCC := M_CC/(π*d_t^3/32) = 10.9693 kgf/mm^2
τ_maxCC := 4/3*T_CC/(π*d_t^2/4) = 4.26584 kgf/mm^2
z := 0 mm, (60/50) mm .. 50 mm = [
    0; 1.2; 2.4; 3.6; 4.8; 6; 7.2; 8.4; 9.6; 10.8
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] mm
τ_sCC(z) := (4*T_CC/(3*π*(d_t/2)^2))*(1 - (z/(d_t/2))^2)
σ_CC(z) := M_CC/(π*d_t^4/64)*z
σ_id(z) := sqrt(σ_CC(z)^2 + 3*τ_sCC(z)^2)
σ_id(z) = [
    72457976; 72461849; 72473584; 72493534; 72522284; 72560654; 72609695; 72670685; 72745132; 72834765
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] kg/(m*s^2)
τ_sCC(z) = [
    41833632; 41811776; 41746208; 41636929; 41483937; 41287234; 41046818; 40762691; 40434852; 40063301
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] kg/(m*s^2)
σ_CC(z) = [
    0; 2458793; 4917586; 7376379; 9835172; 12293965; 14752758; 17211552; 19670345; 22129138
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] kg/(m*s^2)
# [plot: σ_id(z) (kgf/mm^2) vs z (mm)]
# [plot: τ_sCC(z) (kgf/mm^2) vs z (mm)]
# [plot: σ_CC(z) (kgf/mm^2) vs z (mm)]
σ_id(d_t/2) = 10.9693 kgf/mm^2
a/d_t = 0.857143
p := (G_u + G_g + G_i)/(2*a*d_t) = 2.93159 kgf/mm^2
τ_maxl := 3/2*(G_g + G_u + G_i)/(4*s_1*(l_1 - d_t/2)) = 3.0222 kgf/mm^2
τ_maxp := 3/2*(G_g + G_u + G_i)/(4*s_2*(l_1 - d_t/2)) = 3.77775 kgf/mm^2
d_c := 120 mm
l_1/A_1 = 0.863636
d_c/A_1 = 0.545455
k_t := interp(y_S, x, y, d_c/A_1)
σ := (G_u + G_g + G_i)/(2*(s_1 + s_2)*(A_1 - d_c)) = 3.07817 kgf/mm^2
σ_maxDD := σ*k_t = 7.57094 kgf/mm^2
dx1 := A_1 = 220 mm
dx2 := 3*A_1 = 660 mm
dxp := dx1, dx1 + (dx2 - dx1)/50 .. dx2
f(dxp) := interp(y_S, x, y, d_c/A_1)/(s_1*(A_1 - d_c)) - interp(y_S, x, y, d_c/dxp)/(s_2*(dxp - d_c))
dxs := root(f(dxp), dxp, dx1, dx2) = 256.08 mm
# [plot: interp(y_S, x, y, d_c/A_1)/(s_1*(A_1 - d_c)), interp(y_S, x, y, d_c/dxp)/(s_2*(dxp - d_c)) vs dxp (mm)]
σ_l := (G_u + G_g + G_i)/(4*s_1*(A_1 - d_c)) = 2.77035 kgf/mm^2
σ_p := (G_u + G_g + G_i)/(4*s_2*(dxs - d_c)) = 2.54477 kgf/mm^2
kt_l := interp(y_S, x, y, d_c/A_1) = 2.45956
kt_p := interp(y_S, x, y, d_c/dxs) = 2.67758
σ_lmax := kt_l*σ_l = 6.81384 kgf/mm^2
σ_pmax := kt_p*σ_p = 6.81384 kgf/mm^2
y_p := (dxs - A_1)/2 = 18.0402 mm
l_2 := 225 mm
α_p := atan(l_2/y_p) = 85.4159 deg
# Verifica della sezione E-E
l_2 = 225 mm
l_2 := 235 mm
s_1 = 50 mm
s_2 = 40 mm
τ_maxp := 3/2*(G_g + G_u + G_i)/(4*s_2*(l_2 - d_c/2)) = 2.96823 kgf/mm^2
τ_maxl := 3/2*(G_g + G_u + G_i)/(4*s_1*(l_2 - d_c/2)) = 2.37459 kgf/mm^2
